// COMSOL Multiphysics 5.3.1.201 model "Pulso_Temp.mph"
// Outline of the model tree

Parameters
  Pp = 0.3[MW]
  tau = 140[fs]
  Cabs = 1.98e4[nm^2]
  w_0 = 6[mm]

Geometry
  geom1 "Geometry 1" (3D, length unit nm)
    sph1: Sphere | r = 50
    sph2: Sphere | r = 500
    fin: Finalize "Form Union"

Physics
  ht: HeatTransfer "Heat Transfer in Solids" on all domains
    dependent variable T
    solid1: SolidHeatTransferModel "Solid 1" (default)
    init1: init "Initial Values 1" (default)
    ins1: ThermalInsulation (default)
    hs1: HeatSource on domains 2

Mesh
  mesh1 "Mesh 1" (physics-controlled)

Studies
  std1 "Study 1"
    time: Transient "Time Dependent" | tlist = range(0,0.1,1)